# Задача 1. Визначення теплоти, що поглинає діоксид вуглецю при нагріванні
# За коефіцієнтами з таблиці 1.1 визначити теплоту, що поглинає діоксид вуглецю при нагріванні 100 м³ від 25 до 1000 °С за сталого об'єму.
# Дано:
# Формула теплоємності з таблиці 1.1: c_p = a + bT + cT^-2
# Коефіцієнти з таблиці 1.1:
a := 10.55
b := 2.16*10^-3
c := -2.04*10^5
V := 100
t_1 := 25
t_2 := 1000
P := 101325
R := 8.31446
# Розв'язання
T_1 := t_1 + 273.15
T_1 = 298.15
T_2 := t_2 + 273.15
T_2 = 1273.15
n := P*V/(R*T_1)
n = 4087.41
a_v := a*4.1868 - R
a_v = 35.8563
b_v := b*4.1868
b_v = 0.00904349
c_v := c*4.1868
c_v = -854107
c_V(T) := a_v + b_v*T + c_v*T^-2
Q := n*integral(c_V(T), T = T_1 .. T_2)
# Відповідь: Q = 162243177кДж
