# Задача 2. Визначення теплоти міксерного шлаку
# Визначити теплоту, що вносить 0,5 кг міксерного шлаку з температурою 1280 °С, якщо теплоємність задана формулою:
# c = 0.175 + 6*10^-5*T, кДж/кг
# Дано:
# Маса шлаку:
m := 0.5  # кг
# Температура шлаку:
T := (1280 + 273.15)  # К
# Розв'язання
T = 1553.15  # К
Q := m*integral(0.175 + 6*10^-5*T, T = 0 .. T)  # кДж
# Відповідь: Q = 172.085кДж
